Zв := 50
a := 100*10^-3
c := 299792458
h := 1*10^-3
εo := 8.85418782*10^-12
μ := 4*π*10^-7
fo := 10^9
ε := 3.38
b := h*sqrt(ε)/(εo*ε*c*Zв) = 0.00409829
b/h = 4.09829
R := sqrt(1 + 12*h/b) = 1.98193
λcrit := 2.82*h*sqrt(ε*(R - 1)/R) = 0.00364925
Fcrit := c/λcrit = 8.21518e10
α := 8.68*sqrt(π*fo*μ/(59.5*10^6))/(Zв*b) = 0.34504
